// COMSOL Multiphysics 6.4.0.293 model "3d_fixed_verified_plots_rotating_60rpm_unsolved.mph"
// Outline of the model tree

Parameters
  R1 = 15[mm]
  f = 1.46666667
  R2 = R1*f
  L = 1.8
  rad = 30[deg]
  U = 0.68
  Vis = 1.002*10^-3
  D = 2381
  Q = U*pi*(R2^2-R1^2)
  gap = R2-R1
  hxy = gap/4
  hmin = gap/12
  hwall = gap/6
  Nz = 30
  Nrot = 60[1/min]
  omega = 2*pi*Nrot

Geometry
  geom1 "几何 1" (3D, length unit m)
    cyl1: Cylinder "圆柱体 1" | r = R1; h = L
    cyl2: Cylinder "圆柱体 2" | r = R2; h = L
    dif1: Difference "差集 1" | input = cyl2; input2 = cyl1
    fin: Finalize "形成联合体"

Materials
  mat1: Common "Water" (disabled) on all domains
    def: def "Basic"
      thermalexpansioncoefficient = alpha_p(T)
      bulkviscosity = muB(T)
      dynamicviscosity = Vis
      ratioofspecificheat = gamma_w(T)
      electricconductivity = 5.5e-6[S/m]
      heatcapacity = Cp(T)
      density = 1150
      thermalconductivity = k(T)
      soundspeed = cs(T)
      eta: Piecewise
        arg = T
        pieces = 
          {273.15, 413.15, 1.3799566804-0.021224019151*T^1+1.3604562827E-4*T^2-4.6454090319E-7*T^3+8.9042735735E-10*T^4-9.0790692686E-13*T^5+3.8457331488E-16*T^6}
          {413.15, 553.75, 0.00401235783-2.10746715E-5*T^1+3.85772275E-8*T^2-2.39730284E-11*T^3}
        argunit = K
        fununit = Pa*s
      Cp: Piecewise | arg = T; pieces = {273.15, 553.75, 12010.1471-80.4072879*T^1+0.309866854*T^2-5.38186884E-4*T^3+3.62536437E-7*T^4}; argunit = K; fununit = J/(kg*K)
      rho: Piecewise
        arg = T
        smooth = contd1
        pieces = 
          {273.15, 293.15, 6.3092789034e-05*T^3-0.0603676398829*T^2+18.9229382407066*T-950.704055329848}
          {293.15, 373.15, 1.0335053319e-05*T^3-0.0133950656345*T^2+4.96928883266*T+432.257114008512}
        argunit = K
        fununit = kg/m^3
      k: Piecewise | arg = T; pieces = {273.15, 553.75, -0.869083936+0.00894880345*T^1-1.58366345E-5*T^2+7.97543259E-9*T^3}; argunit = K; fununit = W/(m*K)
      cs: Interpolation
        funcnametable = {cs, 1}
        table = {{273, 1403}, {278, 1427}, {283, 1447}, {293, 1481}, {303, 1507}, {313, 1526}, {323, 1541}, {333, 1552}, {343, 1555}, {353, 1555}, {363, 1550}, {373, 1543}}
        interp = piecewisecubic
        fununit = m/s
        argunit = K
        plotfuncname = cs
      an1: Analytic | funcname = alpha_p; expr = -1/rho(T)*d(rho(T),T); args = T; fununit = 1/K; argunit = K
      an2: Analytic | funcname = gamma_w; expr = 1+(T/Cp(T))*(alpha_p(T)*cs(T))^2; args = T; fununit = 1; argunit = K
      an3: Analytic | funcname = muB; expr = 2.79*eta(T); args = T; fununit = Pa*s; argunit = K

Physics
  ee: EulerEulerModelkeps "欧拉–欧拉模型，湍流" on all domains
    dependent variable uc = {ucx, ucy, ucz}
    dependent variable C
    TurbulenceModelProperty.editTurbulenceModelParameters = 0
    pp1: PhaseProperties "相属性 1" (default)
      diam = 0.002
      ContinuousPhase = dommat
      DispersedPhase = none
      rhoc_mat = userdef
      rhoc = 998
      rhod_mat = userdef
      rhod = D
      muc_mat = userdef
      muc = Vis
      mudModel = Gidaspow
      DragModel = Gidaspow
      SolidPressureModel = GidaspowEttehadieh
    init1: init "初始值 1" (default)
      uc = {0, 0, U}
      ud = {0, 0, U}
      p = ((1-0.04)*998[kg/m^3]+0.04*2381[kg/m^3])*g_const*cos(rad)*(1.8[m]-z)
      k = 0.005[m^2/s^2]
      ep = 0.005[m^2/s^3]
      phid = 0.04
    wallbc1: WallBC "壁 1" (default) | DispersedVelocityBoundaryCondition = Slip
    inl1: Inlet "入口 1" on boundaries 3 | uc0 = {0, 0, U}; ud0 = {0, 0, U}; phid0 = 0.04
    out1: Outlet "出口 1" on boundaries 4
    gr1: Gravity "重力 1" on all domains | g = {g_const*sin(rad), 0, -g_const*cos(rad)}
    wallrot: WallBC "旋转内管壁（60 rpm，可由Nrot修改）" on boundaries 5, 6, 8, 9
      ContinuousVelocityBoundaryCondition = NoSlip
      DispersedVelocityBoundaryCondition = Slip
      DispersedPhaseBoundaryCondition = NoDispersedPhaseFlux
      TranslationalVelocityOption = Manual
      utr = {-omega*y, omega*x, 0}
      SlidingWall = 1

Mesh
  mesh1 "网格 1"
    size: MeshSizeDefault "大小" | hauto = 8; custom = on
    size1: Size "大小 1" on boundaries 3 | hmax = hxy; hmin = hmin; hcurve = 0.3; hgrad = 1.2; hauto = 8; custom = on
    size2: Size "大小 2" on edges 4, 5, 9, 10, 13, 16, 19, 22 | hmax = hwall; hmin = hmin; hauto = 6
    cr1: CornerRefinement "角细化 1" on domains 1 | boundary = boundaries 1, 2, 5-10
    ftet1: FreeTet "自由四面体网格 1" (disabled) on remaining entities
    bl1: BndLayer "边界层 1" (disabled) on domains 1 | sharpcorners = trim
      blp1: BndLayerProp "边界层属性 1" on boundaries 1, 2, 5-10
        blnlayers = 5
        blhminfact = 2.5
        blhmin = 0.00151445925607
        blhtot = 0.01127
    size3: Size "大小 3" (disabled) on entire geometry
    fq1: FreeQuad "自由四边形网格 1" on boundaries 3
    swe1: Sweep "扫掠 1" on domains 1 | sourceface = boundaries 3; targetface = boundaries 4
      dis1: Distribution "分布 1" on domains 1 | numelem = Nz

Studies
  std1 "研究 1"
    time: Transient "瞬态" | tlist = range(0,0.2,10); usertol = on; rtol = 0.1

Solver configurations
  sol1 "解 1" (study std1)
    v1: Variables "因变量 1"
      comp1_ep: Field "湍流耗散率 (comp1.ep)" | scalemethod = manual; scaleval = 0.005
      comp1_k: Field "湍动能 (comp1.k)" | scalemethod = manual; scaleval = 0.005
    t1: Time "瞬态求解器 1" | tlist = range(0,0.2,10); initialstepbdf = 5e-6; maxstepconstraintbdf = const; maxstepbdf = 0.01
      se1: Segregated "分离 1" | maxsegiter = 15
        ss1: SegregatedStep "流动变量 uc、ud、p" | subjtech = onevery
        ss2: SegregatedStep "湍流变量"
        ss3: SegregatedStep "体积分数"
        ll1: LowerLimit "下限 1"
      i1: Iterative "AMG，流体流动变量 (ee)"
        mg1: Multigrid "多重网格 1"
      d1: Direct "直接，湍流变量 (ee)"
      d2: Direct "直接，体积分数 (ee)"

Datasets
  dset1: Solution | solution = sol1
  mesh1: Mesh "网格 1" | mesh = mesh1
  cln1: CutLine3D "三维截线 1" | data = mesh1; genpoints = {{0, 0, 0}, {0, 0, 1.8}}
  cpl1: CutPlane "中心纵切面 (y=0)" | data = dset1; quickplane = zx; quicky = 0[m]
  sec1: Sector3D "三维扇区 1" | data = dset1

Plots
  pg1: PlotGroup3D "连续相速度 (ee)" | data = dset1
    mslc1: Multislice "多切面 1" | expr = ee.Uc
  pg2: PlotGroup3D "分散相体积分数 (ee)" | data = dset1
    mslc1: Multislice "多切面 1" | data = dset1; expr = C
  pg3: PlotGroup2D "二维绘图组 3"
  pg4: PlotGroup3D "分散相速度分布 - 三维" | data = dset1
    mslc1: Multislice "多切面 1" | expr = ee.Ud; unit = m/s; descr = 速度大小，分散相
    con1: Contour "等值线 1" | expr = C
  pg5: PlotGroup2D "中心纵切面 - 分散相体积分数" | data = cpl1
    surf1: Surface "表面 1" | expr = C; unit = 1; descr = 体积分数，分散相
  pg6: PlotGroup2D "中心纵切面 - 分散相速度" | data = cpl1
    surf1: Surface "表面 1" | expr = ee.Ud; unit = m/s; descr = 速度大小，分散相
    arws1: ArrowSurface "面上箭头 1" | expr = {udx, udz}